# LAMMPS input template — substituted by gen_inputs.py
# Material: ZnO  | KIM: Tersoff_LAMMPS_ErhartJuslinGoy_2006_ZnO__MO_616776018688_004

units           metal
atom_style      charge
boundary        p p p

kim init Tersoff_LAMMPS_ErhartJuslinGoy_2006_ZnO__MO_616776018688_004 metal

read_data       lammps_init/ZnO.lmp

kim interactions Zn O

comm_modify     cutoff 8.0

# === Геометрическая минимизация ===
min_style       cg
minimize        1e-13 1e-13 20000 20000

# === Мягкий разогрев (NVE + Langevin) ===
timestep        0.0005
velocity        all create 10 4928459 rot yes
velocity        all zero linear
fix             fxnve all nve
fix             fxlang all langevin 10 10 0.5 48279
run             20000

# === Прогрев 10 -> 300 K (NPT) ===
unfix           fxnve
unfix           fxlang
fix             fxmom all momentum 100 linear 1 1 1
fix             fxnpt all npt temp 10 300 0.1 iso 0.0 0.0 1.0
run             20000

# === Основной съём (NPT, 300 K) ===
unfix           fxnpt

thermo          1000
thermo_style    custom step temp press vol lx ly lz pe etotal

fix  fxmom all momentum 100 linear 1 1 1 angular
fix  fxnpt_main all npt temp 300 300 0.1 aniso 0.0 0.0 1.0

timestep        0.001
dump            mydmp all custom 500 dumps/dump.ZnO id type x y z
dump_modify     mydmp sort id
run             100000
